New "Generator.ugs_bess" bus1=UGS_DC-BB phases=3 kv=1.5 kW=-10 kvar=0 model=3
New "Generator.ugs_1_pv" bus1=UGS_PV_DC-BB phases=3 kv=0.75 kW=15 kvar=0 model=3
New "Generator.ugs_2_pv" bus1=UGS_PV_DC-BB phases=3 kv=0.75 kW=15 kvar=0 model=3
New "Generator.ev-fast_bess" bus1=EV-Fast_DC-BB phases=3 kv=0.6 kW=10 kvar=0 model=3
New "Generator.ev-fast_pv" bus1=EV-Fast_DC-BB phases=3 kv=0.6 kW=30 kvar=0 model=3
New "Generator.pros_bess" bus1=Pros1_DC-BB phases=3 kv=0.6 kW=-50 kvar=0 model=3
New "Generator.pros_dc-micro-wind" bus1=Pros1_DC-BB phases=3 kv=0.6 kW=10 kvar=0 model=3
New "Generator.pros_pv" bus1=Pros2_DC-BB phases=3 kv=0.6 kW=50 kvar=0 model=3
New "Generator.wpg_1_wind" bus1=WPG_2_BB phases=3 kv=2 kW=140 pf=0.84
New "Generator.wpg_2_wind" bus1=WPG_2_BB phases=3 kv=2 kW=140 pf=0.87
New "Generator.wpg_bess" bus1=WPG_PV_DC-BB phases=3 kv=0.6 kW=-100 kvar=0 model=3
New "Generator.wpg_pv" bus1=WPG_PV_DC-BB phases=3 kv=0.6 kW=40 kvar=0 model=3
